*HEADING
G01 S-LIN T0 layout C3D20 locking diagnostic, not a second error axis
units: mm, N, s, MPa, t. Illustrative steel, not a coupon card.
beam=G01 case=S-LIN job=g01_slin_t0_c3d20 type=C3D20
E=210000.0 nu=0.3 fy=235.0 load=-5000.0 N on TIP_TOP
*NODE, NSET=NALL
1, 0, -10, 0
2, 111.111111111, -10, 0
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*ELEMENT, TYPE=C3D20, ELSET=EALL
1, 1, 2, 3, 4, 5, 6, 7, 8, 913, 914, 915, 916, 917, 918, 919
920, 921, 922, 923, 924
2, 5, 6, 7, 8, 9, 10, 11, 12, 917, 918, 919, 920, 925, 926, 927
928, 929, 930, 931, 932
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*NSET, NSET=CLAMP
1, 4, 5, 8, 9, 12
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*NSET, NSET=TIP_TOP
887, 888, 891, 894, 896, 898, 900, 903, 906, 909, 912
*NSET, NSET=TIP_FLANGE
887, 888, 891, 894, 896, 898, 900, 903, 906, 909, 912
*MATERIAL, NAME=STEEL
*ELASTIC
210000, 0.3
*SOLID SECTION, ELSET=EALL, MATERIAL=STEEL
*BOUNDARY
CLAMP, 1, 3, 0.0
*STEP
*STATIC
*CLOAD
887, 3, -454.545454545
888, 3, -454.545454545
891, 3, -454.545454545
894, 3, -454.545454545
896, 3, -454.545454545
898, 3, -454.545454545
900, 3, -454.545454545
903, 3, -454.545454545
906, 3, -454.545454545
909, 3, -454.545454545
912, 3, -454.545454545
*NODE FILE
U
*EL FILE
S, ENER
*NODE PRINT, NSET=TIP_TOP
U
*NODE PRINT, NSET=CLAMP
RF
*EL PRINT, ELSET=EALL
ELSE
*ENERGY PRINT
*END STEP
