*HEADING
T08 S-LIN t08_slin_nx14 conforming C3D8 frozen T
units: mm, N, s, MPa, t. Illustrative steel, not a coupon card.
beam=T08 case=S-LIN job=t08_slin_nx14 type=C3D8
E=210000.0 nu=0.3 fy=235.0 load=-5000.0 N on TIP_TOP
*NODE, NSET=NALL
1, 0, -16, 0
2, 142.857142857, -15.2857142857, 8.92857142857
3, 142.857142857, 0, 8.92857142857
4, 0, 0, 0
5, 0, -16, 42
6, 142.857142857, -15.2857142857, 49.1428571429
7, 142.857142857, 0, 49.1428571429
8, 0, 0, 42
9, 0, -16, 84
10, 142.857142857, -15.2857142857, 89.3571428571
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*ELEMENT, TYPE=C3D8, ELSET=EALL
1, 1, 2, 3, 4, 5, 6, 7, 8
2, 5, 6, 7, 8, 9, 10, 11, 12
3, 9, 10, 11, 12, 13, 14, 15, 16
4, 13, 14, 15, 16, 17, 18, 19, 20
5, 17, 18, 19, 20, 21, 22, 23, 24
6, 4, 3, 25, 26, 8, 7, 27, 28
7, 8, 7, 27, 28, 12, 11, 29, 30
8, 12, 11, 29, 30, 16, 15, 31, 32
9, 16, 15, 31, 32, 20, 19, 33, 34
10, 20, 19, 33, 34, 24, 23, 35, 36
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*NSET, NSET=CLAMP
1, 4, 5, 8, 9, 12, 13, 16, 17, 20, 21, 24, 26, 28, 30, 32
34, 36, 37, 40, 41, 44, 45, 48, 50, 52, 54, 56, 58, 60, 62, 64
66, 68, 70, 72, 74, 76, 78, 80, 82, 84, 86, 88, 90, 92, 94, 96
*NSET, NSET=TIP_TOP
695, 696, 699, 702, 704, 706, 708, 711, 714, 717, 720
*NSET, NSET=TIP_FLANGE
695, 696, 699, 702, 704, 706, 708, 711, 714, 717, 720
*MATERIAL, NAME=STEEL
*ELASTIC
210000, 0.3
*SOLID SECTION, ELSET=EALL, MATERIAL=STEEL
*BOUNDARY
CLAMP, 1, 3, 0.0
*STEP
*STATIC
*CLOAD
695, 3, -454.545454545
696, 3, -454.545454545
699, 3, -454.545454545
702, 3, -454.545454545
704, 3, -454.545454545
706, 3, -454.545454545
708, 3, -454.545454545
711, 3, -454.545454545
714, 3, -454.545454545
717, 3, -454.545454545
720, 3, -454.545454545
*NODE FILE
U
*EL FILE
S, ENER
*NODE PRINT, NSET=TIP_TOP
U
*NODE PRINT, NSET=CLAMP
RF
*EL PRINT, ELSET=EALL
ELSE
*ENERGY PRINT
*END STEP
