*HEADING
G01 S-ISO g01_s-iso_delegated conforming C3D8 frozen T
units: mm, N, s, MPa, t. Illustrative steel, not a coupon card.
beam=G01 case=S-ISO job=g01_s-iso_delegated type=C3D8
E=210000.0 nu=0.3 fy=235.0 load=-21125.063318777295 N on TIP_TOP
*NODE, NSET=NALL
1, 0, -10, 0
2, 36, -10, 0
3, 36, 0, 0
4, 0, 0, 0
5, 0, -10, 28
6, 36, -10, 28
7, 36, 0, 28
8, 0, 0, 28
9, 0, -10, 56
10, 36, -10, 56
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*ELEMENT, TYPE=C3D8, ELSET=EALL
1, 1, 2, 3, 4, 5, 6, 7, 8
2, 5, 6, 7, 8, 9, 10, 11, 12
3, 9, 10, 11, 12, 13, 14, 15, 16
4, 13, 14, 15, 16, 17, 18, 19, 20
5, 17, 18, 19, 20, 21, 22, 23, 24
6, 4, 3, 25, 26, 8, 7, 27, 28
7, 8, 7, 27, 28, 12, 11, 29, 30
8, 12, 11, 29, 30, 16, 15, 31, 32
9, 16, 15, 31, 32, 20, 19, 33, 34
10, 20, 19, 33, 34, 24, 23, 35, 36
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*NSET, NSET=CLAMP
1, 4, 5, 8, 9, 12, 13, 16, 17, 20, 21, 24, 26, 28, 30, 32
34, 36, 37, 40, 41, 44, 45, 48, 50, 52, 54, 56, 58, 60, 62, 64
66, 68, 70, 72, 74, 76, 78, 80, 82, 84, 86, 88, 90, 92, 94, 96
*NSET, NSET=TIP_TOP
1703, 1704, 1707, 1710, 1712, 1714, 1716, 1719, 1722, 1725, 1728
*NSET, NSET=TIP_FLANGE
1703, 1704, 1707, 1710, 1712, 1714, 1716, 1719, 1722, 1725, 1728
*MATERIAL, NAME=STEEL
*ELASTIC
210000, 0.3
*PLASTIC, HARDENING=ISOTROPIC
235, 0
320, 0.02
400, 0.15
*DENSITY
7.85e-09
*SOLID SECTION, ELSET=EALL, MATERIAL=STEEL
*BOUNDARY
CLAMP, 1, 3, 0.0
*STEP, NLGEOM, INC=80
*STATIC
0.05, 1.0, 1.0e-6, 0.1
*CLOAD
1703, 3, -1920.46030171
1704, 3, -1920.46030171
1707, 3, -1920.46030171
1710, 3, -1920.46030171
1712, 3, -1920.46030171
1714, 3, -1920.46030171
1716, 3, -1920.46030171
1719, 3, -1920.46030171
1722, 3, -1920.46030171
1725, 3, -1920.46030171
1728, 3, -1920.46030171
*NODE FILE
U
*EL FILE
S, PEEQ, ENER
*NODE PRINT, NSET=TIP_TOP
U
*NODE PRINT, NSET=CLAMP
RF
*EL PRINT, ELSET=EALL
ELSE
*ENERGY PRINT
*END STEP
