*HEADING
T08 S-KIN t08_s-kin_rev1 conforming C3D8 frozen T
units: mm, N, s, MPa, t. Illustrative steel, not a coupon card.
beam=T08 case=S-KIN job=t08_s-kin_rev1 type=C3D8
E=210000.0 nu=0.3 fy=235.0 load=-67819.39632994187 N on TIP_TOP
*NODE, NSET=NALL
1, 0, -16, 0
2, 48.3234052356, -15.7583829738, 3.02021282723
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*ELEMENT, TYPE=C3D8, ELSET=EALL
1, 1, 2, 3, 4, 5, 6, 7, 8
2, 5, 6, 7, 8, 9, 10, 11, 12
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*NSET, NSET=CLAMP
1, 4, 5, 8, 9, 12
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*NSET, NSET=TIP_TOP
2279, 2280, 2283, 2286, 2288, 2290, 2292, 2295, 2298, 2301, 2304
*NSET, NSET=TIP_FLANGE
2279, 2280, 2283, 2286, 2288, 2290, 2292, 2295, 2298, 2301, 2304
*MATERIAL, NAME=STEEL
*ELASTIC
210000, 0.3
*PLASTIC, HARDENING=KINEMATIC
235, 0
320, 0.02
400, 0.15
*DENSITY
7.85e-09
*SOLID SECTION, ELSET=EALL, MATERIAL=STEEL
*BOUNDARY
CLAMP, 1, 3, 0.0
*STEP, NLGEOM, INC=80
*STATIC
0.05, 1.0, 1.0e-6, 0.1
*CLOAD
2279, 3, -6165.39966636
2280, 3, -6165.39966636
2283, 3, -6165.39966636
2286, 3, -6165.39966636
2288, 3, -6165.39966636
2290, 3, -6165.39966636
2292, 3, -6165.39966636
2295, 3, -6165.39966636
2298, 3, -6165.39966636
2301, 3, -6165.39966636
2304, 3, -6165.39966636
*NODE FILE
U
*EL FILE
S, PEEQ, ENER
*NODE PRINT, NSET=TIP_TOP
U
*NODE PRINT, NSET=CLAMP
RF
*EL PRINT, ELSET=EALL
ELSE
*ENERGY PRINT
*END STEP
*STEP, NLGEOM, INC=80
*STATIC
0.05, 1.0, 1.0e-6, 0.1
*CLOAD
2279, 3, 3082.69983318
2280, 3, 3082.69983318
2283, 3, 3082.69983318
2286, 3, 3082.69983318
2288, 3, 3082.69983318
2290, 3, 3082.69983318
2292, 3, 3082.69983318
2295, 3, 3082.69983318
2298, 3, 3082.69983318
2301, 3, 3082.69983318
2304, 3, 3082.69983318
*NODE FILE
U
*EL FILE
S, PEEQ, ENER
*NODE PRINT, NSET=TIP_TOP
U
*NODE PRINT, NSET=CLAMP
RF
*EL PRINT, ELSET=EALL
ELSE
*ENERGY PRINT
*END STEP
