*HEADING
T09 S-LIN hanging 8-split zz cycle 1
units: mm, N, s, MPa. Material is illustrative steel, not a coupon card.
E=210000.0 nu=0.3. load -5000.0 N on TIP_TOP.
*NODE, NSET=NALL
1, 0, -14, 6
2, 111.111111111, -14, 6
3, 111.111111111, 0, 6
4, 0, 0, 6
5, 0, -14, 44
6, 111.111111111, -14, 44
7, 111.111111111, 0, 44
8, 0, 0, 44
9, 0, -14, 82
10, 111.111111111, -14, 82
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*ELEMENT, TYPE=C3D8, ELSET=EALL
1, 1, 2, 3, 4, 5, 6, 7, 8
2, 5, 6, 7, 8, 9, 10, 11, 12
3, 9, 10, 11, 12, 13, 14, 15, 16
4, 13, 14, 15, 16, 17, 18, 19, 20
5, 17, 18, 19, 20, 21, 22, 23, 24
6, 4, 3, 25, 26, 8, 7, 27, 28
7, 8, 7, 27, 28, 12, 11, 29, 30
8, 12, 11, 29, 30, 16, 15, 31, 32
9, 16, 15, 31, 32, 20, 19, 33, 34
10, 20, 19, 33, 34, 24, 23, 35, 36
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*NSET, NSET=CLAMP
1, 4, 5, 8, 9, 12, 13, 16, 17, 20, 21, 24, 26, 28, 30, 32
34, 36, 37, 40, 41, 44, 45, 48, 50, 52, 54, 56, 58, 60, 62, 64
66, 68, 70, 72, 74, 76, 78, 80, 82, 84, 86, 88, 90, 92, 94, 96
*NSET, NSET=TIP_TOP
887, 888, 891, 894, 896, 898, 900, 903, 906, 909, 912
*MATERIAL, NAME=STEEL
*ELASTIC
210000, 0.3
*SOLID SECTION, ELSET=EALL, MATERIAL=STEEL
*EQUATION
3
913, 1, 1.0, 509, 1, -0.5, 510, 1, -0.5
*EQUATION
3
913, 2, 1.0, 509, 2, -0.5, 510, 2, -0.5
*EQUATION
3
913, 3, 1.0, 509, 3, -0.5, 510, 3, -0.5
*EQUATION
3
914, 1, 1.0, 509, 1, -0.5, 511, 1, -0.5
*EQUATION
3
914, 2, 1.0, 509, 2, -0.5, 511, 2, -0.5
*EQUATION
3
914, 3, 1.0, 509, 3, -0.5, 511, 3, -0.5
*EQUATION
5
915, 1, 1.0, 509, 1, -0.25, 511, 1, -0.25, 512, 1, -0.25, 510, 1, -0.25
*EQUATION
5
915, 2, 1.0, 509, 2, -0.25, 511, 2, -0.25, 512, 2, -0.25, 510, 2, -0.25
*EQUATION
5
915, 3, 1.0, 509, 3, -0.25, 511, 3, -0.25, 512, 3, -0.25, 510, 3, -0.25
*EQUATION
3
916, 1, 1.0, 510, 1, -0.5, 512, 1, -0.5
*EQUATION
3
916, 2, 1.0, 510, 2, -0.5, 512, 2, -0.5
*EQUATION
3
916, 3, 1.0, 510, 3, -0.5, 512, 3, -0.5
*EQUATION
3
917, 1, 1.0, 511, 1, -0.5, 512, 1, -0.5
*EQUATION
3
917, 2, 1.0, 511, 2, -0.5, 512, 2, -0.5
*EQUATION
3
917, 3, 1.0, 511, 3, -0.5, 512, 3, -0.5
*EQUATION
3
918, 1, 1.0, 509, 1, -0.5, 557, 1, -0.5
*EQUATION
3
918, 2, 1.0, 509, 2, -0.5, 557, 2, -0.5
*EQUATION
3
918, 3, 1.0, 509, 3, -0.5, 557, 3, -0.5
*EQUATION
5
919, 1, 1.0, 509, 1, -0.25, 557, 1, -0.25, 558, 1, -0.25, 510, 1, -0.25
*EQUATION
5
919, 2, 1.0, 509, 2, -0.25, 557, 2, -0.25, 558, 2, -0.25, 510, 2, -0.25
*EQUATION
5
919, 3, 1.0, 509, 3, -0.25, 557, 3, -0.25, 558, 3, -0.25, 510, 3, -0.25
*EQUATION
3
920, 1, 1.0, 510, 1, -0.5, 558, 1, -0.5
*EQUATION
3
920, 2, 1.0, 510, 2, -0.5, 558, 2, -0.5
*EQUATION
3
920, 3, 1.0, 510, 3, -0.5, 558, 3, -0.5
*EQUATION
5
921, 1, 1.0, 509, 1, -0.25, 557, 1, -0.25, 559, 1, -0.25, 511, 1, -0.25
*EQUATION
5
921, 2, 1.0, 509, 2, -0.25, 557, 2, -0.25, 559, 2, -0.25, 511, 2, -0.25
*EQUATION
5
921, 3, 1.0, 509, 3, -0.25, 557, 3, -0.25, 559, 3, -0.25, 511, 3, -0.25
*EQUATION
3
924, 1, 1.0, 511, 1, -0.5, 559, 1, -0.5
*EQUATION
3
924, 2, 1.0, 511, 2, -0.5, 559, 2, -0.5
*EQUATION
3
924, 3, 1.0, 511, 3, -0.5, 559, 3, -0.5
*EQUATION
5
925, 1, 1.0, 511, 1, -0.25, 559, 1, -0.25, 560, 1, -0.25, 512, 1, -0.25
*EQUATION
5
925, 2, 1.0, 511, 2, -0.25, 559, 2, -0.25, 560, 2, -0.25, 512, 2, -0.25
*EQUATION
5
925, 3, 1.0, 511, 3, -0.25, 559, 3, -0.25, 560, 3, -0.25, 512, 3, -0.25
*EQUATION
3
926, 1, 1.0, 512, 1, -0.5, 560, 1, -0.5
*EQUATION
3
926, 2, 1.0, 512, 2, -0.5, 560, 2, -0.5
*EQUATION
3
926, 3, 1.0, 512, 3, -0.5, 560, 3, -0.5
*EQUATION
3
927, 1, 1.0, 557, 1, -0.5, 558, 1, -0.5
*EQUATION
3
927, 2, 1.0, 557, 2, -0.5, 558, 2, -0.5
*EQUATION
3
927, 3, 1.0, 557, 3, -0.5, 558, 3, -0.5
*EQUATION
3
928, 1, 1.0, 557, 1, -0.5, 559, 1, -0.5
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*BOUNDARY
CLAMP, 1, 3, 0.0
*STEP
*STATIC
*CLOAD
887, 3, -454.545454545
888, 3, -454.545454545
891, 3, -454.545454545
894, 3, -454.545454545
896, 3, -454.545454545
898, 3, -454.545454545
900, 3, -454.545454545
903, 3, -454.545454545
906, 3, -454.545454545
909, 3, -454.545454545
912, 3, -454.545454545
*NODE FILE
U
*EL FILE
S, ENER
*NODE PRINT, NSET=TIP_TOP
U
*NODE PRINT, NSET=CLAMP
RF
*EL PRINT, ELSET=EALL
ELSE
*ENERGY PRINT
*END STEP
